// SBML level 3 version 1

model teusink()

  // Compartments:
  compartment default_compartment = 1;

  // Species:
  species ACE in default_compartment = 0.04;  // CHEBI:15343
  species BPG in default_compartment = 0; BPG is "1,3-bisphosphoglyceric acid";  // obo.chebi:28907 kegg.compound:C00236
  species $CO2 in default_compartment = 1;  // CHEBI:16526
  species $ETOH in default_compartment = 50;  // CHEBI:16236
  species F16P in default_compartment = 0.1; F16P is "D-fructose 1,6-bisphosphate";  // obo.chebi:16905 kegg.compound:C00354
  species F6P in default_compartment = 0.28; F6P is "D-fructose 6-phosphate";  // kegg.compound:C00085 obo.chebi:15946
  species G6P in default_compartment = 1.39; G6P is "alpha-D-glucose 6-phosphate";  // kegg.compound:C00092 obo.chebi:17665
  species GLCi in default_compartment = 0.087;  // CHEBI:17234
  species $GLCo in default_compartment = 50;  // CHEBI:17234
  species $GLY in default_compartment = 0.15;  // CHEBI:17754
  species $Glyc in default_compartment = 0;  // CHEBI:28087
  species NAD in default_compartment = 1.2; NAD is "NAD(+)";  // obo.chebi:15846
  species NADH in default_compartment = 0.39;  // obo.chebi:16908 kegg.compound:C00004
  species P2G in default_compartment = 0.1; P2G is "2-phospho-D-glyceric acid";  // kegg.compound:C00631 obo.chebi:17835
  species P3G in default_compartment = 0.1; P3G is "3-phospho-D-glyceric acid";  // kegg.compound:C00197 obo.chebi:17794
  species PEP in default_compartment = 0.1; PEP is "phosphoenolpyruvate";  // obo.chebi:18021 kegg.compound:C00074
  species PYR in default_compartment = 3.36; PYR is "pyruvate";  // obo.chebi:15361 kegg.compound:C00022
  species Prb in default_compartment = 5;
  species $SUCC in default_compartment = 0;  // CHEBI:15741 kegg.compound:C00042
  species TRIO in default_compartment = 5.17;  // CHEBI:29052 kegg.compound:C00111
  species $Trh in default_compartment = 0;  // CHEBI:27082
  species $X in default_compartment = 0;

  // Parameters:
  CPFKAMP = 0.0845;
  CPFKATP = 3;
  CPFKF16BP = 0.397;
  CPFKF26BP = 0.0174;
  CPFKF6P = 0;
  CiPFKATP = 100;
  F26BP = 0.02;
  KATPASE = 39.5;
  KGLYCOGEN = 6;
  KPFKAMP = 0.0995;
  KPFKF16BP = 0.111;
  KPFKF26BP = 0.000682;
  KSUCC = 21.4;
  KTREHALOSE = 2.4;
  KeqADH = 6.9e-5;
  KeqAK = 0.45;
  KeqALD = 0.069;
  KeqENO = 6.7;
  KeqG3PDH = 4300;
  KeqGLK = 3800;
  KeqGLT = 1;
  KeqPGI = 0.314;
  KeqPGK = 3200;
  KeqPGM = 0.19;
  KeqPYK = 6500;
  KeqTPI = 0.045;
  KiADHACE = 1.1;
  KiADHETOH = 90;
  KiADHNAD = 0.92;
  KiADHNADH = 0.031;
  KiPFKATP = 0.65;
  KmADHACE = 1.11;
  KmADHETOH = 17;
  KmADHNAD = 0.17;
  KmADHNADH = 0.11;
  KmALDDHAP = 2.4;
  KmALDF16P = 0.3;
  KmALDGAP = 2;
  KmALDGAPi = 10;
  KmENOP2G = 0.04;
  KmENOPEP = 0.5;
  KmG3PDHDHAP = 0.4;
  KmG3PDHGLY = 1;
  KmG3PDHNAD = 0.93;
  KmG3PDHNADH = 0.023;
  KmGAPDHBPG = 0.0098;
  KmGAPDHGAP = 0.21;
  KmGAPDHNAD = 0.09;
  KmGAPDHNADH = 0.06;
  KmGLKADP = 0.23;
  KmGLKATP = 0.15;
  KmGLKG6P = 30;
  KmGLKGLCi = 0.08;
  KmGLTGLCi = 1.1918;
  KmGLTGLCo = 1.1918;
  KmPDCPYR = 4.33;
  KmPFKATP = 0.71;
  KmPFKF6P = 0.1;
  KmPGIF6P = 0.3;
  KmPGIG6P = 1.4;
  KmPGKADP = 0.2;
  KmPGKATP = 0.3;
  KmPGKBPG = 0.003;
  KmPGKP3G = 0.53;
  KmPGMP2G = 0.08;
  KmPGMP3G = 1.2;
  KmPYKADP = 0.53;
  KmPYKATP = 1.5;
  KmPYKPEP = 0.14;
  KmPYKPYR = 21;
  L0 = 0.66;
  SUMAXP = 4.1;
  VmADH = 810;
  VmALD = 322.258;
  VmENO = 365.806;
  VmG3PDH = 70.15;
  VmGAPDHf = 1184.52;
  VmGAPDHr = 6549.68;
  VmGLK = 226.452;
  VmGLT = 97.264;
  VmPDC = 174.194;
  VmPFK = 182.903;
  VmPGI = 339.677;
  VmPGK = 1306.45;
  VmPGM = 2525.81;
  VmPYK = 1088.71;
  gR = 5.12;
  nPDC = 1.9;

  // Reactions:
  hexokinase: GLCi + Prb -> G6P; VmGLK*(-(G6P*(SUMAXP - (SUMAXP^2 - 2*SUMAXP*Prb + 8*KeqAK*SUMAXP*Prb + Prb^2 - 4*KeqAK*Prb^2)^0.5)/((1 - 4*KeqAK)*KeqGLK)) + GLCi*(-SUMAXP + Prb - 4*KeqAK*Prb + (SUMAXP^2 - 2*SUMAXP*Prb + 8*KeqAK*SUMAXP*Prb + Prb^2 - 4*KeqAK*Prb^2)^0.5)/(2 - 8*KeqAK))/(KmGLKATP*KmGLKGLCi*(1 + G6P/KmGLKG6P + GLCi/KmGLKGLCi)*(1 + (SUMAXP - (SUMAXP^2 - 2*SUMAXP*Prb + 8*KeqAK*SUMAXP*Prb + Prb^2 - 4*KeqAK*Prb^2)^0.5)/((1 - 4*KeqAK)*KmGLKADP) + (-SUMAXP + Prb - 4*KeqAK*Prb + (SUMAXP^2 - 2*SUMAXP*Prb + 8*KeqAK*SUMAXP*Prb + Prb^2 - 4*KeqAK*Prb^2)^0.5)/((2 - 8*KeqAK)*KmGLKATP)));  // ec-code:2.7.1.1 interpro:IPR001312
  v_10: P2G -> PEP; VmENO/KmENOP2G*(P2G - PEP/KeqENO)/(1 + P2G/KmENOP2G + PEP/KmENOPEP); v_10 is "2-Phospho-D-glycerate 2,3-phosphomutase";  // kegg.reaction:R01518
  v_11: PEP -> PYR + Prb; VmPYK/(KmPYKPEP*KmPYKADP)*(PEP*(SUMAXP - (Prb^2 - 4*KeqAK*Prb^2 - 2*Prb*SUMAXP + 8*KeqAK*Prb*SUMAXP + SUMAXP^2)^0.5)/(1 - 4*KeqAK) - PYR*((Prb - 4*KeqAK*Prb - SUMAXP + (Prb^2 - 4*KeqAK*Prb^2 - 2*Prb*SUMAXP + 8*KeqAK*Prb*SUMAXP + SUMAXP^2)^0.5)/(2 - 8*KeqAK))/KeqPYK)/((1 + PEP/KmPYKPEP + PYR/KmPYKPYR)*(1 + (Prb - 4*KeqAK*Prb - SUMAXP + (Prb^2 - 4*KeqAK*Prb^2 - 2*Prb*SUMAXP + 8*KeqAK*Prb*SUMAXP + SUMAXP^2)^0.5)/(2 - 8*KeqAK)/KmPYKATP + (SUMAXP - (Prb^2 - 4*KeqAK*Prb^2 - 2*Prb*SUMAXP + 8*KeqAK*Prb*SUMAXP + SUMAXP^2)^0.5)/(1 - 4*KeqAK)/KmPYKADP)); v_11 is "2-phospho-D-glycerate hydro-lyase (phosphoenolpyruvate-forming)";  // kegg.reaction:R00658
  v_12: PYR -> $CO2 + ACE; VmPDC*(PYR^nPDC/KmPDCPYR^nPDC)/(1 + PYR^nPDC/KmPDCPYR^nPDC); v_12 is "ATP:pyruvate 2-O-phosphotransferase";  // kegg.reaction:R00200
  v_13: 2 ACE + 3 NAD -> $SUCC + 3 NADH; KSUCC*ACE; v_13 is "pyruvate carboxy-lyase (acetaldehyde-forming)";  // kegg.reaction:R00224
  glucose_transport: $GLCo -> GLCi; VmGLT*(GLCo - GLCi/KeqGLT)/(KmGLTGLCo*(1 + GLCo/KmGLTGLCo + GLCi/KmGLTGLCi + 0.91*GLCo*GLCi/(KmGLTGLCi*KmGLTGLCo)));
  ethanol_NAD_oxidoreductase: ACE + NADH -> NAD + $ETOH; -(VmADH/(KiADHNAD*KmADHETOH)*(NAD*ETOH - NADH*ACE/KeqADH)/(1 + NAD/KiADHNAD + KmADHNAD*ETOH/(KiADHNAD*KmADHETOH) + KmADHNADH*ACE/(KiADHNADH*KmADHACE) + NADH/KiADHNADH + NAD*ETOH/(KiADHNAD*KmADHETOH) + KmADHNADH*NAD*ACE/(KiADHNAD*KiADHNADH*KmADHACE) + KmADHNAD*ETOH*NADH/(KiADHNAD*KmADHETOH*KiADHNADH) + NADH*ACE/(KiADHNADH*KmADHACE) + NAD*ETOH*ACE/(KiADHNAD*KmADHETOH*KiADHACE) + ETOH*NADH*ACE/(KiADHETOH*KiADHNADH*KmADHACE))); ethanol_NAD_oxidoreductase is "ethanol:NAD+ oxidoreductase";  // kegg.reaction:R00754
  gpdh: TRIO + NADH -> NAD + $GLY; VmG3PDH*(-(GLY*NAD/KeqG3PDH) + NADH*TRIO/(1 + KeqTPI))/(KmG3PDHDHAP*KmG3PDHNADH*(1 + NAD/KmG3PDHNAD + NADH/KmG3PDHNADH)*(1 + GLY/KmG3PDHGLY + TRIO/((1 + KeqTPI)*KmG3PDHDHAP)));  // ec-code:1.1.1.94
  ATP_catabolic_process: Prb -> $X; KATPASE*((Prb - 4*KeqAK*Prb - SUMAXP + (Prb^2 - 4*KeqAK*Prb^2 - 2*Prb*SUMAXP + 8*KeqAK*Prb*SUMAXP + SUMAXP^2)^0.5)/(2 - 8*KeqAK));  // obo.go:0006200
  v_2: G6P -> F6P; VmPGI/KmPGIG6P*(G6P - F6P/KeqPGI)/(1 + G6P/KmPGIG6P + F6P/KmPGIF6P); v_2 is "ATP:D-glucose 6-phosphotransferase";  // kegg.reaction:R00299
  v_3: G6P + Prb -> $Glyc; KGLYCOGEN;
  v_4: 2 G6P + Prb -> $Trh; KTREHALOSE;
  v_5: F6P + Prb -> F16P; gR*VmPFK*F6P*(-SUMAXP + Prb - 4*KeqAK*Prb + (SUMAXP^2 - 2*SUMAXP*Prb + 8*KeqAK*SUMAXP*Prb + Prb^2 - 4*KeqAK*Prb^2)^0.5)*(1 + F6P/KmPFKF6P + (-SUMAXP + Prb - 4*KeqAK*Prb + (SUMAXP^2 - 2*SUMAXP*Prb + 8*KeqAK*SUMAXP*Prb + Prb^2 - 4*KeqAK*Prb^2)^0.5)/((2 - 8*KeqAK)*KmPFKATP) + gR*F6P*(-SUMAXP + Prb - 4*KeqAK*Prb + (SUMAXP^2 - 2*SUMAXP*Prb + 8*KeqAK*SUMAXP*Prb + Prb^2 - 4*KeqAK*Prb^2)^0.5)/((2 - 8*KeqAK)*KmPFKATP*KmPFKF6P))/((2 - 8*KeqAK)*KmPFKATP*KmPFKF6P*(L0*(1 + CPFKF26BP*F26BP/KPFKF26BP + CPFKF16BP*F16P/KPFKF16BP)^2*(1 + 2*CPFKAMP*KeqAK*(SUMAXP - (SUMAXP^2 - 2*SUMAXP*Prb + 8*KeqAK*SUMAXP*Prb + Prb^2 - 4*KeqAK*Prb^2)^0.5)^2/((-1 + 4*KeqAK)*KPFKAMP*(SUMAXP - Prb + 4*KeqAK*Prb - (SUMAXP^2 - 2*SUMAXP*Prb + 8*KeqAK*SUMAXP*Prb + Prb^2 - 4*KeqAK*Prb^2)^0.5)))^2*(1 + CiPFKATP*(-SUMAXP + Prb - 4*KeqAK*Prb + (SUMAXP^2 - 2*SUMAXP*Prb + 8*KeqAK*SUMAXP*Prb + Prb^2 - 4*KeqAK*Prb^2)^0.5)/((2 - 8*KeqAK)*KiPFKATP))^2*(1 + CPFKATP*(-SUMAXP + Prb - 4*KeqAK*Prb + (SUMAXP^2 - 2*SUMAXP*Prb + 8*KeqAK*SUMAXP*Prb + Prb^2 - 4*KeqAK*Prb^2)^0.5)/((2 - 8*KeqAK)*KmPFKATP))^2/((1 + F26BP/KPFKF26BP + F16P/KPFKF16BP)^2*(1 + 2*KeqAK*(SUMAXP - (SUMAXP^2 - 2*SUMAXP*Prb + 8*KeqAK*SUMAXP*Prb + Prb^2 - 4*KeqAK*Prb^2)^0.5)^2/((-1 + 4*KeqAK)*KPFKAMP*(SUMAXP - Prb + 4*KeqAK*Prb - (SUMAXP^2 - 2*SUMAXP*Prb + 8*KeqAK*SUMAXP*Prb + Prb^2 - 4*KeqAK*Prb^2)^0.5)))^2*(1 + (-SUMAXP + Prb - 4*KeqAK*Prb + (SUMAXP^2 - 2*SUMAXP*Prb + 8*KeqAK*SUMAXP*Prb + Prb^2 - 4*KeqAK*Prb^2)^0.5)/((2 - 8*KeqAK)*KiPFKATP))^2) + (1 + F6P/KmPFKF6P + (-SUMAXP + Prb - 4*KeqAK*Prb + (SUMAXP^2 - 2*SUMAXP*Prb + 8*KeqAK*SUMAXP*Prb + Prb^2 - 4*KeqAK*Prb^2)^0.5)/((2 - 8*KeqAK)*KmPFKATP) + gR*F6P*(-SUMAXP + Prb - 4*KeqAK*Prb + (SUMAXP^2 - 2*SUMAXP*Prb + 8*KeqAK*SUMAXP*Prb + Prb^2 - 4*KeqAK*Prb^2)^0.5)/((2 - 8*KeqAK)*KmPFKATP*KmPFKF6P))^2)); v_5 is "alpha-D-Glucose 6-phosphate ketol-isomerase";  // kegg.reaction:R02740
  v_6: F16P -> 2 TRIO; VmALD*(F16P - KeqTPI*TRIO^2/(KeqALD*(1 + KeqTPI)^2))/(KmALDF16P*(1 + F16P/KmALDF16P + TRIO/((1 + KeqTPI)*KmALDDHAP) + KeqTPI*TRIO/((1 + KeqTPI)*KmALDGAP) + KeqTPI*F16P*TRIO/((1 + KeqTPI)*KmALDF16P*KmALDGAPi) + KeqTPI*TRIO^2/((1 + KeqTPI)^2*KmALDDHAP*KmALDGAP))); v_6 is "ATP:D-fructose-6-phosphate 1-phosphotransferase";  // kegg.reaction:R04779 ec-code:2.7.1.11
  v_7: TRIO + NAD -> BPG + NADH; (-(VmGAPDHr*BPG*NADH/(KmGAPDHBPG*KmGAPDHNADH)) + KeqTPI*VmGAPDHf*NAD*TRIO/((1 + KeqTPI)*KmGAPDHGAP*KmGAPDHNAD))/((1 + NAD/KmGAPDHNAD + NADH/KmGAPDHNADH)*(1 + BPG/KmGAPDHBPG + KeqTPI*TRIO/((1 + KeqTPI)*KmGAPDHGAP))); v_7 is "D-fructose-1,6-bisphosphate D-glyceraldehyde-3-phosphate-lyase(glycerone-phosphate-forming)";  // kegg.reaction:R01068
  v_8: BPG -> P3G + Prb; VmPGK*(KeqPGK*BPG*(SUMAXP - (SUMAXP^2 - 2*SUMAXP*Prb + 8*KeqAK*SUMAXP*Prb + Prb^2 - 4*KeqAK*Prb^2)^0.5)/(1 - 4*KeqAK) - (-SUMAXP + Prb - 4*KeqAK*Prb + (SUMAXP^2 - 2*SUMAXP*Prb + 8*KeqAK*SUMAXP*Prb + Prb^2 - 4*KeqAK*Prb^2)^0.5)*P3G/(2 - 8*KeqAK))/(KmPGKATP*KmPGKP3G*(1 + (SUMAXP - (SUMAXP^2 - 2*SUMAXP*Prb + 8*KeqAK*SUMAXP*Prb + Prb^2 - 4*KeqAK*Prb^2)^0.5)/((1 - 4*KeqAK)*KmPGKADP) + (-SUMAXP + Prb - 4*KeqAK*Prb + (SUMAXP^2 - 2*SUMAXP*Prb + 8*KeqAK*SUMAXP*Prb + Prb^2 - 4*KeqAK*Prb^2)^0.5)/((2 - 8*KeqAK)*KmPGKATP))*(1 + BPG/KmPGKBPG + P3G/KmPGKP3G)); v_8 is "D-glyceraldehyde-3-phosphate:NAD+ oxidoreductase (phosphorylating)";  // kegg.reaction:R01061
  v_9: P3G -> P2G; VmPGM/KmPGMP3G*(P3G - P2G/KeqPGM)/(1 + P3G/KmPGMP3G + P2G/KmPGMP2G); v_9 is "ATP:3-phospho-D-glycerate 1-phosphotransferase";  // kegg.reaction:R01512
end
