// SBML level 3 version 1

function Constant_flux__irreversible(v)
  v;
end
Constant_flux__irreversible is "Constant flux (irreversible)";

function Function_for_Alcohol_dehydrogenase(ACE, ETOH, KeqADH, KiADHACE, KiADHETOH, KiADHNAD, KiADHNADH, KmADHACE, KmADHETOH, KmADHNAD, KmADHNADH, NAD, NADH, VmADH, cytosol)
  -cytosol*(VmADH/(KiADHNAD*KmADHETOH)*(NAD*ETOH - NADH*ACE/KeqADH)/(1 + NAD/KiADHNAD + KmADHNAD*ETOH/(KiADHNAD*KmADHETOH) + KmADHNADH*ACE/(KiADHNADH*KmADHACE) + NADH/KiADHNADH + NAD*ETOH/(KiADHNAD*KmADHETOH) + KmADHNADH*NAD*ACE/(KiADHNAD*KiADHNADH*KmADHACE) + KmADHNAD*ETOH*NADH/(KiADHNAD*KmADHETOH*KiADHNADH) + NADH*ACE/(KiADHNADH*KmADHACE) + NAD*ETOH*ACE/(KiADHNAD*KmADHETOH*KiADHACE) + ETOH*NADH*ACE/(KiADHETOH*KiADHNADH*KmADHACE)))/cytosol;
end

function Function_for_Glycerol_3_phosphate_dehydrogenase(GLY, KeqG3PDH, KeqTPI, KmG3PDHDHAP, KmG3PDHGLY, KmG3PDHNAD, KmG3PDHNADH, NAD, NADH, TRIO, VmG3PDH)
  VmG3PDH/(KmG3PDHDHAP*KmG3PDHNADH)*(1/(1 + KeqTPI)*TRIO*NADH - GLY*NAD/KeqG3PDH)/((1 + 1/(1 + KeqTPI)*TRIO/KmG3PDHDHAP + GLY/KmG3PDHGLY)*(1 + NADH/KmG3PDHNADH + NAD/KmG3PDHNAD));
end
Function_for_Glycerol_3_phosphate_dehydrogenase is "Function for Glycerol 3-phosphate dehydrogenase";

function R_PFK(KmF6P, KmATP, g, AT_, F6)
  1 + F6/KmF6P + AT_/KmATP + g*(F6/KmF6P)*(AT_/KmATP);
end

function T_PFK(CATP, KmATP, AT_)
  1 + CATP*(AT_/KmATP);
end

function L_PFK(L, CiATP, KiATP, CAMP, KAMP, CF26BP, KF26BP, CF16BP, KF16BP, AT_, AM, F16, F26)
  L*((1 + CiATP*(AT_/KiATP))/(1 + AT_/KiATP))^2*((1 + CAMP*(AM/KAMP))/(1 + AM/KAMP))^2*((1 + CF26BP*F26/KF26BP + CF16BP*F16/KF16BP)/(1 + F26/KF26BP + F16/KF16BP))^2;
end

function Function_for_Hexokinase(ADP, ATP, G6P, GLCi, KeqGLK, KmGLKADP, KmGLKATP, KmGLKG6P, KmGLKGLCi, VmGLK)
  VmGLK/(KmGLKGLCi*KmGLKATP)*(GLCi*ATP - G6P*ADP/KeqGLK)/((1 + GLCi/KmGLKGLCi + G6P/KmGLKG6P)*(1 + ATP/KmGLKATP + ADP/KmGLKADP));
end

function Function_for_Glucose_6_phosphate_isomerase(F6P, G6P, KeqPGI_2, KmPGIF6P_2, KmPGIG6P_2, VmPGI_2)
  VmPGI_2/KmPGIG6P_2*(G6P - F6P/KeqPGI_2)/(1 + G6P/KmPGIG6P_2 + F6P/KmPGIF6P_2);
end
Function_for_Glucose_6_phosphate_isomerase is "Function for Glucose-6-phosphate isomerase";

function Function_for_Aldolase(F16P, KeqALD, KeqTPI, KmALDDHAP, KmALDF16P, KmALDGAP, KmALDGAPi, TRIO, VmALD)
  VmALD/KmALDF16P*(F16P - KeqTPI/(1 + KeqTPI)*TRIO*(1/(1 + KeqTPI))*TRIO/KeqALD)/(1 + F16P/KmALDF16P + KeqTPI/(1 + KeqTPI)*TRIO/KmALDGAP + 1/(1 + KeqTPI)*TRIO/KmALDDHAP + KeqTPI/(1 + KeqTPI)*TRIO*(1/(1 + KeqTPI))*TRIO/(KmALDGAP*KmALDDHAP) + F16P*(KeqTPI/(1 + KeqTPI))*TRIO/(KmALDGAPi*KmALDF16P));
end

function Function_for_Phosphoglycerate_kinase(ADP, ATP, BPG, KeqPGK, KmPGKADP, KmPGKATP, KmPGKBPG, KmPGKP3G, P3G, VmPGK)
  VmPGK/(KmPGKP3G*KmPGKATP)*(KeqPGK*BPG*ADP - P3G*ATP)/((1 + BPG/KmPGKBPG + P3G/KmPGKP3G)*(1 + ATP/KmPGKATP + ADP/KmPGKADP));
end

function Function_for_Glyceraldehyde_3_phosphate_dehydrogenase(BPG, KeqTPI, KmGAPDHBPG, KmGAPDHGAP, KmGAPDHNAD, KmGAPDHNADH, NAD, NADH, TRIO, VmGAPDHf, VmGAPDHr)
  (VmGAPDHf*(KeqTPI/(1 + KeqTPI))*TRIO*NAD/(KmGAPDHGAP*KmGAPDHNAD) - VmGAPDHr*BPG*NADH/(KmGAPDHBPG*KmGAPDHNADH))/((1 + KeqTPI/(1 + KeqTPI)*TRIO/KmGAPDHGAP + BPG/KmGAPDHBPG)*(1 + NAD/KmGAPDHNAD + NADH/KmGAPDHNADH));
end
Function_for_Glyceraldehyde_3_phosphate_dehydrogenase is "Function for Glyceraldehyde 3-phosphate dehydrogenase";

function Function_for_Enolase(KeqENO, KmENOP2G, KmENOPEP, P2G, PEP, VmENO)
  VmENO/KmENOP2G*(P2G - PEP/KeqENO)/(1 + P2G/KmENOP2G + PEP/KmENOPEP);
end

function Function_for_Pyruvate_decarboxylase(KmPDCPYR, PYR, VmPDC, nPDC)
  VmPDC*(PYR^nPDC/KmPDCPYR^nPDC)/(1 + PYR^nPDC/KmPDCPYR^nPDC);
end

function Function_for_Succinate_synthesis(ACE, KSUCC)
  KSUCC*ACE;
end

function Function_for_Glucose_transport(GLCi, GLCo, KeqGLT, KmGLTGLCi, KmGLTGLCo, VmGLT)
  VmGLT/KmGLTGLCo*(GLCo - GLCi/KeqGLT)/(1 + GLCo/KmGLTGLCo + GLCi/KmGLTGLCi + 0.91*GLCo*GLCi/(KmGLTGLCo*KmGLTGLCi));
end

function Function_for_Phosphoglycerate_mutase(KeqPGM, KmPGMP2G, KmPGMP3G, P2G, P3G, VmPGM)
  VmPGM/KmPGMP3G*(P3G - P2G/KeqPGM)/(1 + P3G/KmPGMP3G + P2G/KmPGMP2G);
end

function Function_for_Pyruvate_kinase(ADP, ATP, KeqPYK, KmPYKADP, KmPYKATP, KmPYKPEP, KmPYKPYR, PEP, PYR, VmPYK)
  VmPYK/(KmPYKPEP*KmPYKADP)*(PEP*ADP - PYR*ATP/KeqPYK)/((1 + PEP/KmPYKPEP + PYR/KmPYKPYR)*(1 + ATP/KmPYKATP + ADP/KmPYKADP));
end

function Function_for_ATPase_activity(ATP, KATPASE)
  KATPASE*ATP;
end

function Function_for_Phosphofructokinase(AMP, ATP, CPFKAMP, CPFKATP, CPFKF16BP, CPFKF26BP, CiPFKATP, F16P, F26BP, F6P, KPFKAMP, KPFKF16BP, KPFKF26BP, KiPFKATP, KmPFKATP, KmPFKF6P, Lzero, VmPFK, gR)
  VmPFK*gR*(F6P/KmPFKF6P)*(ATP/KmPFKATP)*R_PFK(KmPFKF6P, KmPFKATP, gR, ATP, F6P)/(R_PFK(KmPFKF6P, KmPFKATP, gR, ATP, F6P)^2 + L_PFK(Lzero, CiPFKATP, KiPFKATP, CPFKAMP, KPFKAMP, CPFKF26BP, KPFKF26BP, CPFKF16BP, KPFKF16BP, ATP, AMP, F16P, F26BP)*T_PFK(CPFKATP, KmPFKATP, ATP)^2);
end

model Teusink2000_Glycolysis()
  // Teusink2000_Glycolysis_1
  // biomodels.db:MODEL6623915522 biomodels.db:BIOMD0000000064 GO:0006096 kegg.pathway:sce00010
  // isHomologTo reactome:REACT_723
  // hasTaxon taxonomy:4932
  // isDescribedBy pubmed:10951190
  // model units - substance: substance, time: time_unit

  // Compartments:
  compartment extracellular = 1;  // GO:0005576
  compartment cytosol = 1;  // GO:0005829

  // Species:
  species GLCi in cytosol = 0.087; GLCi is "Glucose in Cytosol";  // CHEBI:17234 kegg.compound:C00293
  species G6P in cytosol = 2.45; G6P is "Glucose 6 Phosphate";  // kegg.compound:C00668 CHEBI:17665
  species F6P in cytosol = 0.62; F6P is "Fructose 6 Phosphate";  // kegg.compound:C05345 CHEBI:15946
  species F16P in cytosol = 5.51; F16P is "Fructose-1,6 bisphosphate";  // CHEBI:16905 kegg.compound:C00354
  species TRIO in cytosol = 0.96; TRIO is "Triose-phosphate";  // hasPart CHEBI:16108 CHEBI:29052 kegg.compound:C00118 kegg.compound:C00111
  species BPG in cytosol = 0; BPG is "1,3-bisphosphoglycerate";  // CHEBI:16001 kegg.compound:C00236
  species P3G in cytosol = 0.9; P3G is "3-phosphoglycerate";  // kegg.compound:C00197 CHEBI:17794
  species P2G in cytosol = 0.12; P2G is "2-phosphoglycerate";  // kegg.compound:C00631 CHEBI:17835
  species PEP in cytosol = 0.07; PEP is "Phosphoenolpyruvate";  // CHEBI:18021 kegg.compound:C00074
  species PYR in cytosol = 1.85; PYR is "Pyruvate";  // kegg.compound:C00022 CHEBI:32816 CHEBI:15361
  species ACE in cytosol = 0.17; ACE is "Acetaldehyde";  // kegg.compound:C00084 CHEBI:15343
  species P in cytosol = 6.31; P is "High energy phosphates";  // hasPart CHEBI:16761 kegg.compound:C00008 kegg.compound:C00002 CHEBI:15422
  species NAD in cytosol = 1.2;  // kegg.compound:C00003 CHEBI:15846
  species NADH in cytosol = 0.39;  // CHEBI:16908
  species $Glyc in cytosol = 0; Glyc is "Glycogen";  // kegg.compound:C00182 CHEBI:28087
  species $Trh in cytosol = 0; Trh is "Trehalose";  // kegg.compound:C01083 CHEBI:27082
  species $CO2 in cytosol = 1;  // kegg.compound:C00011 CHEBI:16526
  species $SUCC in cytosol = 0; SUCC is "Succinate";  // CHEBI:30031
  species $GLCo in extracellular = 50; GLCo is "Extracellular Glucose";  // kegg.compound:C00293 CHEBI:17234
  species $ETOH in cytosol = 50; ETOH is "Ethanol";  // kegg.compound:C00469 CHEBI:16236
  species $GLY in cytosol = 0.15; GLY is "Glycerol";  // kegg.compound:C00116 CHEBI:17754
  species $ATP in cytosol; ATP is "ATP concentration";  // kegg.compound:C00002 CHEBI:15422
  species $ADP in cytosol; ADP is "ADP concentration";  // kegg.compound:C00008 CHEBI:16761
  species $SUM_P in cytosol = 4.1; SUM_P is "sum of AXP conc";  // hasPart CHEBI:16027 kegg.compound:C00008 CHEBI:15422 kegg.compound:C00002
  species $AMP in cytosol; AMP is "AMP concentration";  // CHEBI:16027 kegg.compound:C00020
  species $F26BP in cytosol = 0.02; F26BP is "F2,6P";  // kegg.compound:C00665 CHEBI:28602

  // Parameters:
  KeqAK = 0.45 unit_0; KeqAK is "AK eq constant";
  vGLK_KeqGLK = 3800;
  vGLK_KmGLKADP = 0.23;
  vGLK_KmGLKATP = 0.15;
  vGLK_KmGLKG6P = 30;
  vGLK_KmGLKGLCi = 0.08;
  vGLK_VmGLK = 226.452;
  vPGI_KeqPGI_2 = 0.314;
  vPGI_KmPGIF6P_2 = 0.3;
  vPGI_KmPGIG6P_2 = 1.4;
  vPGI_VmPGI_2 = 339.677;
  vGLYCO_v = 6;
  vTreha_v = 2.4;
  CPFKAMP = 0.0845 unit_0;
  CPFKATP = 3 unit_0;
  CPFKF16BP = 0.397 unit_0;
  CPFKF26BP = 0.0174 unit_0;
  CiPFKATP = 100 unit_0;
  KPFKAMP = 0.0995 unit_1;
  KPFKF16BP = 0.111 unit_1;
  KPFKF26BP = 0.000682 unit_1;
  KiPFKATP = 0.65 unit_1;
  KmPFKATP = 0.71 unit_1;
  KmPFKF6P = 0.1 unit_1;
  Lzero = 0.66 unit_0;
  vPFK_VmPFK = 182.903;
  gR = 5.12 unit_0;
  vALD_KeqALD = 0.069;
  KeqTPI = 0.045 unit_0; KeqTPI is "TPI eq constant";
  vALD_KmALDDHAP = 2.4;
  vALD_KmALDF16P = 0.3;
  vALD_KmALDGAP = 2;
  vALD_KmALDGAPi = 10;
  vALD_VmALD = 322.258;
  vGAPDH_KmGAPDHBPG = 0.0098;
  vGAPDH_KmGAPDHGAP = 0.21;
  vGAPDH_KmGAPDHNAD = 0.09;
  vGAPDH_KmGAPDHNADH = 0.06;
  vGAPDH_VmGAPDHf = 1184.52;
  vGAPDH_VmGAPDHr = 6549.8;
  vPGK_KeqPGK = 3200;
  vPGK_KmPGKADP = 0.2;
  vPGK_KmPGKATP = 0.3;
  vPGK_KmPGKBPG = 0.003;
  vPGK_KmPGKP3G = 0.53;
  vPGK_VmPGK = 1306.45;
  vPGM_KeqPGM = 0.19;
  vPGM_KmPGMP2G = 0.08;
  vPGM_KmPGMP3G = 1.2;
  vPGM_VmPGM = 2525.81;
  vENO_KeqENO = 6.7;
  vENO_KmENOP2G = 0.04;
  vENO_KmENOPEP = 0.5;
  vENO_VmENO = 365.806;
  vPYK_KeqPYK = 6500;
  vPYK_KmPYKADP = 0.53;
  vPYK_KmPYKATP = 1.5;
  vPYK_KmPYKPEP = 0.14;
  vPYK_KmPYKPYR = 21;
  vPYK_VmPYK = 1088.71;
  vPDC_KmPDCPYR = 4.33;
  vPDC_VmPDC = 174.194;
  vPDC_nPDC = 1.9;
  vSUC_KSUCC = 21.4;
  vGLT_KeqGLT = 1;
  vGLT_KmGLTGLCi = 1.1918;
  vGLT_KmGLTGLCo = 1.1918;
  vGLT_VmGLT = 97.264;
  vADH_KeqADH = 6.9e-5;
  vADH_KiADHACE = 1.1;
  vADH_KiADHETOH = 90;
  vADH_KiADHNAD = 0.92;
  vADH_KiADHNADH = 0.031;
  vADH_KmADHACE = 1.11;
  vADH_KmADHETOH = 17;
  vADH_KmADHNAD = 0.17;
  vADH_KmADHNADH = 0.11;
  vADH_VmADH = 810;
  vG3PDH_KeqG3PDH = 4300;
  vG3PDH_KmG3PDHDHAP = 0.4;
  vG3PDH_KmG3PDHGLY = 1;
  vG3PDH_KmG3PDHNAD = 0.93;
  vG3PDH_KmG3PDHNADH = 0.023;
  vG3PDH_VmG3PDH = 70.15;
  vATP_KATPASE = 33.7;

  // Assignment rules:
  ATP := (P - ADP)/2;
  ADP := (SUM_P - (P^2*(1 - 4*KeqAK) + 2*SUM_P*P*(4*KeqAK - 1) + SUM_P^2)^0.5)/(1 - 4*KeqAK);
  AMP := SUM_P - ATP - ADP;

  // Reactions:
  vGLK: GLCi + P -> G6P; cytosol*Function_for_Hexokinase(ADP, ATP, G6P, GLCi, vGLK_KeqGLK, vGLK_KmGLKADP, vGLK_KmGLKATP, vGLK_KmGLKG6P, vGLK_KmGLKGLCi, vGLK_VmGLK); vGLK is "Hexokinase";  // modifiers: ATP, ADP; kegg.reaction:R00299 ec-code:2.7.1.2; isHomologTo reactome:REACT_1318
  vPGI: G6P -> F6P; cytosol*Function_for_Glucose_6_phosphate_isomerase(F6P, G6P, vPGI_KeqPGI_2, vPGI_KmPGIF6P_2, vPGI_KmPGIG6P_2, vPGI_VmPGI_2); vPGI is "Glucose-6-phosphate isomerase";  // ec-code:5.3.1.9 kegg.reaction:R00771; isHomologTo reactome:REACT_116
  vGLYCO: G6P + P => $Glyc; cytosol*Constant_flux__irreversible(vGLYCO_v); vGLYCO is "Glycogen synthesis";  // isHomologTo reactome:REACT_1736; isVersionOf GO:0005978
  vTreha: 2 G6P + P => $Trh; cytosol*Constant_flux__irreversible(vTreha_v); vTreha is "Trehalose 6-phosphate synthase";  // isVersionOf GO:0005992
  vPFK: F6P + P => F16P; cytosol*Function_for_Phosphofructokinase(AMP, ATP, CPFKAMP, CPFKATP, CPFKF16BP, CPFKF26BP, CiPFKATP, F16P, F26BP, F6P, KPFKAMP, KPFKF16BP, KPFKF26BP, KiPFKATP, KmPFKATP, KmPFKF6P, Lzero, vPFK_VmPFK, gR); vPFK is "Phosphofructokinase";  // modifiers: AMP, F26BP, ATP; ec-code:2.7.1.11 kegg.reaction:R00756; isHomologTo reactome:REACT_736
  vALD: F16P -> 2 TRIO; cytosol*Function_for_Aldolase(F16P, vALD_KeqALD, KeqTPI, vALD_KmALDDHAP, vALD_KmALDF16P, vALD_KmALDGAP, vALD_KmALDGAPi, TRIO, vALD_VmALD); vALD is "Aldolase";  // ec-code:4.1.2.13 kegg.reaction:R01070; isHomologTo reactome:REACT_1602
  vGAPDH: TRIO + NAD -> BPG + NADH; cytosol*Function_for_Glyceraldehyde_3_phosphate_dehydrogenase(BPG, KeqTPI, vGAPDH_KmGAPDHBPG, vGAPDH_KmGAPDHGAP, vGAPDH_KmGAPDHNAD, vGAPDH_KmGAPDHNADH, NAD, NADH, TRIO, vGAPDH_VmGAPDHf, vGAPDH_VmGAPDHr); vGAPDH is "Glyceraldehyde 3-phosphate dehydrogenase";  // ec-code:1.2.1.12 kegg.reaction:R01061; isHomologTo reactome:REACT_1847
  vPGK: BPG -> P3G + P; cytosol*Function_for_Phosphoglycerate_kinase(ADP, ATP, BPG, vPGK_KeqPGK, vPGK_KmPGKADP, vPGK_KmPGKATP, vPGK_KmPGKBPG, vPGK_KmPGKP3G, P3G, vPGK_VmPGK); vPGK is "Phosphoglycerate kinase";  // modifiers: ATP, ADP; kegg.reaction:R01512 ec-code:2.7.2.3; isHomologTo reactome:REACT_1771
  vPGM: P3G -> P2G; cytosol*Function_for_Phosphoglycerate_mutase(vPGM_KeqPGM, vPGM_KmPGMP2G, vPGM_KmPGMP3G, P2G, P3G, vPGM_VmPGM); vPGM is "Phosphoglycerate mutase";  // kegg.reaction:R01518 ec-code:5.4.2.1; isHomologTo reactome:REACT_576
  vENO: P2G -> PEP; cytosol*Function_for_Enolase(vENO_KeqENO, vENO_KmENOP2G, vENO_KmENOPEP, P2G, PEP, vENO_VmENO); vENO is "Enolase";  // ec-code:4.2.1.11 kegg.reaction:R00658; isHomologTo reactome:REACT_1400
  vPYK: PEP -> PYR + P; cytosol*Function_for_Pyruvate_kinase(ADP, ATP, vPYK_KeqPYK, vPYK_KmPYKADP, vPYK_KmPYKATP, vPYK_KmPYKPEP, vPYK_KmPYKPYR, PEP, PYR, vPYK_VmPYK); vPYK is "Pyruvate kinase";  // modifiers: ATP, ADP; kegg.reaction:R00200 ec-code:2.7.1.40; isHomologTo reactome:REACT_1911
  vPDC: PYR => ACE + $CO2; cytosol*Function_for_Pyruvate_decarboxylase(vPDC_KmPDCPYR, PYR, vPDC_VmPDC, vPDC_nPDC); vPDC is "Pyruvate decarboxylase";  // kegg.reaction:R00224 ec-code:4.1.1.1
  vSUC: 2 ACE + 3 NAD + 4 P => 3 NADH + $SUCC; cytosol*Function_for_Succinate_synthesis(ACE, vSUC_KSUCC); vSUC is "Succinate synthesis";  // isVersionOf GO:0006105
  vGLT: $GLCo -> GLCi; Function_for_Glucose_transport(GLCi, GLCo, vGLT_KeqGLT, vGLT_KmGLTGLCi, vGLT_KmGLTGLCo, vGLT_VmGLT); vGLT is "Glucose transport";  // isHomologTo reactome:REACT_2092; isVersionOf GO:0046323
  vADH: ACE + NADH -> NAD + $ETOH; cytosol*Function_for_Alcohol_dehydrogenase(ACE, ETOH, vADH_KeqADH, vADH_KiADHACE, vADH_KiADHETOH, vADH_KiADHNAD, vADH_KiADHNADH, vADH_KmADHACE, vADH_KmADHETOH, vADH_KmADHNAD, vADH_KmADHNADH, NAD, NADH, vADH_VmADH, cytosol); vADH is "Alcohol dehydrogenase";  // isHomologTo reactome:REACT_799; isVersionOf kegg.reaction:R00746 ec-code:1.1.1.2
  vG3PDH: TRIO + NADH => NAD + $GLY; cytosol*Function_for_Glycerol_3_phosphate_dehydrogenase(GLY, vG3PDH_KeqG3PDH, KeqTPI, vG3PDH_KmG3PDHDHAP, vG3PDH_KmG3PDHGLY, vG3PDH_KmG3PDHNAD, vG3PDH_KmG3PDHNADH, NAD, NADH, TRIO, vG3PDH_VmG3PDH); vG3PDH is "Glycerol 3-phosphate dehydrogenase";  // isVersionOf ec-code:1.1.1.8
  vATP: P -> ; cytosol*Function_for_ATPase_activity(ATP, vATP_KATPASE); vATP is "ATPase activity";  // modifiers: ATP; isVersionOf GO:0016887 ec-code:3.6.1.3

  // Unit definitions:
  unit unit_0 = dimensionless^0; unit_0 is "1";
  unit unit_1 = 1e-3 mole / litre; unit_1 is "mmol/l";
  unit time_unit = 60 second;
  unit substance = 1e-3 mole;
end
