// SBML level 3 version 1

function L_PFK(L, CiATP, KiATP, CAMP, KAMP, CF26BP, KF26BP, CF16BP, KF16BP, AT, AM, F16, F26)
  L*((1 + CiATP*(AT/KiATP))/(1 + AT/KiATP))^2*((1 + CAMP*(AM/KAMP))/(1 + AM/KAMP))^2*((1 + CF26BP*F26/KF26BP + CF16BP*F16/KF16BP)/(1 + F26/KF26BP + F16/KF16BP))^2;
end

function T_PFK(CATP, KmATP, AT)
  1 + CATP*(AT/KmATP);
end

function R_PFK(KmF6P, KmATP, g, AT, F6)
  1 + F6/KmF6P + AT/KmATP + g*(F6/KmF6P)*(AT/KmATP);
end

model BIOMD0000000064_url()

  // Compartments:
  compartment cytosol = 1;
  compartment extracellular = 1; extracellular is "extracellular region";

  // Species:
  species $CO2 in cytosol = 1;
  species F6P in cytosol = 0.62;
  species PYR in cytosol = 1.85;
  species $ATP in cytosol;
  species $ADP in cytosol;
  species TRIO in cytosol = 0.96; TRIO is "Triose-phosphate";
  species $Glyc in cytosol = 0;
  species ACE in cytosol = 0.17;
  species PEP in cytosol = 0.07;
  species P3G in cytosol = 0.9;
  species P2G in cytosol = 0.12;
  species $GLY in cytosol = 0.15;
  species F16P in cytosol = 5.51;
  species $Trh in cytosol = 0;
  species $GLCo in extracellular = 50;
  species NAD in cytosol = 1.2;
  species $SUM_P in cytosol = 4.1; SUM_P is "sum of AXP conc";
  species P in cytosol = 6.31; P is "High energy phosphates";
  species BPG in cytosol = 0;
  species G6P in cytosol = 2.45;
  species NADH in cytosol = 0.39;
  species $AMP in cytosol;
  species $F26BP in cytosol = 0.02;
  species $SUCC in cytosol = 0;
  species $ETOH in cytosol = 50;
  species GLCi in cytosol = 0.087;

  // Parameters:
  gR = 5.12;
  KmPFKF6P = 0.1 mM;
  KmPFKATP = 0.71 mM;
  Lzero = 0.66;
  CiPFKATP = 100;
  KiPFKATP = 0.65 mM;
  CPFKAMP = 0.0845;
  KPFKAMP = 0.0995 mM;
  CPFKF26BP = 0.0174;
  KPFKF26BP = 0.000682 mM;
  CPFKF16BP = 0.397;
  KPFKF16BP = 0.111 mM;
  CPFKATP = 3;
  KeqAK = 0.45;
  KeqTPI = 0.045;

  // Assignment rules:
  ATP := (P - ADP)/2;
  ADP := (SUM_P - (P^2*(1 - 4*KeqAK) + 2*SUM_P*P*(4*KeqAK - 1) + SUM_P^2)^0.5)/(1 - 4*KeqAK);
  AMP := SUM_P - ATP - ADP;

  // Rate rules:
  CO2' = 0;
  Glyc' = 0;
  GLY' = 0;
  Trh' = 0;
  GLCo' = 0;
  SUCC' = 0;
  ETOH' = 0;

  // Reactions:
  vENO: P2G -> PEP; cytosol*VmENO/KmENOP2G*(P2G - PEP/KeqENO)/(1 + P2G/KmENOP2G + PEP/KmENOPEP);
    VmENO = 365.806 mMpermin; KmENOP2G = 0.04 mM; KeqENO = 6.7; KmENOPEP = 0.5 mM;
  vSUC: 2 ACE + 3 NAD + 4 P -> 3 NADH + $SUCC; cytosol*KSUCC*ACE;
    KSUCC = 21.4;
  vALD: F16P -> 2 TRIO; cytosol*VmALD/KmALDF16P*(F16P - KeqTPI/(1 + KeqTPI)*TRIO*(1/(1 + KeqTPI))*TRIO/KeqALD)/(1 + F16P/KmALDF16P + KeqTPI/(1 + KeqTPI)*TRIO/KmALDGAP + 1/(1 + KeqTPI)*TRIO/KmALDDHAP + KeqTPI/(1 + KeqTPI)*TRIO*(1/(1 + KeqTPI))*TRIO/(KmALDGAP*KmALDDHAP) + F16P*(KeqTPI/(1 + KeqTPI))*TRIO/(KmALDGAPi*KmALDF16P));
    VmALD = 322.258 mMpermin; KmALDF16P = 0.3 mM; KeqALD = 0.069; KmALDGAP = 2 mM; KmALDDHAP = 2.4 mM; KmALDGAPi = 10 mM;
  vATP: P -> ; cytosol*KATPASE*ATP;  // modifiers: ATP
    KATPASE = 33.7 permin;
  vPYK: PEP -> PYR + P; cytosol*VmPYK/(KmPYKPEP*KmPYKADP)*(PEP*ADP - PYR*ATP/KeqPYK)/((1 + PEP/KmPYKPEP + PYR/KmPYKPYR)*(1 + ATP/KmPYKATP + ADP/KmPYKADP));  // modifiers: ADP, ATP
    VmPYK = 1088.71 mMpermin; KmPYKPEP = 0.14 mM; KmPYKADP = 0.53 mM; KeqPYK = 6500; KmPYKPYR = 21 mM; KmPYKATP = 1.5 mM;
  vPGI: G6P -> F6P; cytosol*VmPGI_2/KmPGIG6P_2*(G6P - F6P/KeqPGI_2)/(1 + G6P/KmPGIG6P_2 + F6P/KmPGIF6P_2);
    VmPGI_2 = 339.677 mMpermin; KmPGIG6P_2 = 1.4 mM; KeqPGI_2 = 0.314; KmPGIF6P_2 = 0.3 mM;
  vPGM: P3G -> P2G; cytosol*VmPGM/KmPGMP3G*(P3G - P2G/KeqPGM)/(1 + P3G/KmPGMP3G + P2G/KmPGMP2G);
    VmPGM = 2525.81 mMpermin; KmPGMP3G = 1.2 mM; KeqPGM = 0.19; KmPGMP2G = 0.08 mM;
  vTreha: 2 G6P + P -> $Trh; cytosol*KTREHALOSE;
    KTREHALOSE = 2.4 mMpermin;
  vG3PDH: TRIO + NADH -> NAD + $GLY; cytosol*VmG3PDH/(KmG3PDHDHAP*KmG3PDHNADH)*(1/(1 + KeqTPI)*TRIO*NADH - GLY*NAD/KeqG3PDH)/((1 + 1/(1 + KeqTPI)*TRIO/KmG3PDHDHAP + GLY/KmG3PDHGLY)*(1 + NADH/KmG3PDHNADH + NAD/KmG3PDHNAD));
    VmG3PDH = 70.15 mMpermin; KmG3PDHDHAP = 0.4 mM; KmG3PDHNADH = 0.023 mM; KeqG3PDH = 4300; KmG3PDHGLY = 1 mM; KmG3PDHNAD = 0.93 mM;
  vGLK: GLCi + P -> G6P; cytosol*VmGLK/(KmGLKGLCi*KmGLKATP)*(GLCi*ATP - G6P*ADP/KeqGLK)/((1 + GLCi/KmGLKGLCi + G6P/KmGLKG6P)*(1 + ATP/KmGLKATP + ADP/KmGLKADP));  // modifiers: ADP, ATP
    VmGLK = 226.452 mMpermin; KmGLKGLCi = 0.08 mM; KmGLKATP = 0.15 mM; KeqGLK = 3800; KmGLKG6P = 30 mM; KmGLKADP = 0.23 mM;
  vGAPDH: TRIO + NAD -> BPG + NADH; cytosol*(VmGAPDHf*(KeqTPI/(1 + KeqTPI))*TRIO*NAD/(KmGAPDHGAP*KmGAPDHNAD) - VmGAPDHr*BPG*NADH/(KmGAPDHBPG*KmGAPDHNADH))/((1 + KeqTPI/(1 + KeqTPI)*TRIO/KmGAPDHGAP + BPG/KmGAPDHBPG)*(1 + NAD/KmGAPDHNAD + NADH/KmGAPDHNADH));
    VmGAPDHf = 1184.52 mMpermin; KmGAPDHGAP = 0.21 mM; KmGAPDHNAD = 0.09 mM; VmGAPDHr = 6549.8 mMpermin; KmGAPDHBPG = 0.0098 mM; KmGAPDHNADH = 0.06 mM;
  vGLYCO: G6P + P -> $Glyc; cytosol*KGLYCOGEN_3;
    KGLYCOGEN_3 = 6 mMpermin;
  vPDC: PYR -> ACE + $CO2; cytosol*VmPDC*(PYR^nPDC/KmPDCPYR^nPDC)/(1 + PYR^nPDC/KmPDCPYR^nPDC);
    VmPDC = 174.194 mMpermin; nPDC = 1.9; KmPDCPYR = 4.33 mM;
  vPGK: BPG -> P3G + P; cytosol*VmPGK/(KmPGKP3G*KmPGKATP)*(KeqPGK*BPG*ADP - P3G*ATP)/((1 + BPG/KmPGKBPG + P3G/KmPGKP3G)*(1 + ATP/KmPGKATP + ADP/KmPGKADP));  // modifiers: ADP, ATP
    VmPGK = 1306.45 mMpermin; KmPGKP3G = 0.53 mM; KmPGKATP = 0.3 mM; KeqPGK = 3200; KmPGKBPG = 0.003 mM; KmPGKADP = 0.2 mM;
  vADH: ACE + NADH -> NAD + $ETOH; -cytosol*(VmADH/(KiADHNAD*KmADHETOH)*(NAD*ETOH - NADH*ACE/KeqADH)/(1 + NAD/KiADHNAD + KmADHNAD*ETOH/(KiADHNAD*KmADHETOH) + KmADHNADH*ACE/(KiADHNADH*KmADHACE) + NADH/KiADHNADH + NAD*ETOH/(KiADHNAD*KmADHETOH) + KmADHNADH*NAD*ACE/(KiADHNAD*KiADHNADH*KmADHACE) + KmADHNAD*ETOH*NADH/(KiADHNAD*KmADHETOH*KiADHNADH) + NADH*ACE/(KiADHNADH*KmADHACE) + NAD*ETOH*ACE/(KiADHNAD*KmADHETOH*KiADHACE) + ETOH*NADH*ACE/(KiADHETOH*KiADHNADH*KmADHACE)));
    VmADH = 810 mMpermin; KiADHNAD = 0.92 mM; KmADHETOH = 17 mM; KeqADH = 6.9e-5; KmADHNAD = 0.17 mM; KmADHNADH = 0.11 mM; KiADHNADH = 0.031 mM; KmADHACE = 1.11 mM; KiADHACE = 1.1 mM; KiADHETOH = 90 mM;
  vGLT: $GLCo -> GLCi; VmGLT/KmGLTGLCo*(GLCo - GLCi/KeqGLT)/(1 + GLCo/KmGLTGLCo + GLCi/KmGLTGLCi + 0.91*GLCo*GLCi/(KmGLTGLCo*KmGLTGLCi));
    VmGLT = 97.264 mmolepermin; KmGLTGLCo = 1.1918 mM; KeqGLT = 1 mM; KmGLTGLCi = 1.1918 mM;
  vPFK: F6P + P -> F16P; cytosol*VmPFK*gR*(F6P/KmPFKF6P)*(ATP/KmPFKATP)*R_PFK(KmPFKF6P, KmPFKATP, gR, ATP, F6P)/(R_PFK(KmPFKF6P, KmPFKATP, gR, ATP, F6P)^2 + L_PFK(Lzero, CiPFKATP, KiPFKATP, CPFKAMP, KPFKAMP, CPFKF26BP, KPFKF26BP, CPFKF16BP, KPFKF16BP, ATP, AMP, F16P, F26BP)*T_PFK(CPFKATP, KmPFKATP, ATP)^2);  // modifiers: F26BP, ATP, AMP
    VmPFK = 182.903 mMpermin;

  // Unit definitions:
  unit substance = 1e-3 mole;
  unit permin = 1 / (60 second);
  unit mmolepermin = 1e-3 mole / (60 second);
  unit substance_per_volume = 1e-3 mole;
  unit substance_per_time = 1e-3 mole / (60 second);
  unit mMpermin = 1e-3 mole / (60 second);
  unit mM = 1e-3 mole;
  unit time = 60 second;
end
